variable temp equal 1000
# 简单 2-D 玩具体系，用 Lennard-Jones
units metal
atom_style atomic
boundary p p p

region box block -20 20 -20 20 -20 20
create_box 1 box
#create_atoms 1 random 2 12345 box
create_atoms 1 single 0.0 0.0 0.0
create_atoms 1 single 6.0 0.0 0.0

mass 1 16
pair_style lj/cut 10.0
pair_coeff 1 1 0.1947 3.541


timestep 0.001
#velocity all create 1.0 12345
#velocity all create 1.0 0.0 0.0
velocity all create ${temp} 12345

# 加载插件
#plugin load /home/excelsior/zqc/work/lammps-metad-toy/fix_crystallize_plugin.so

# 调用 metad fix：fix ID group metad sigma height biasf pace cv_dim nbin_num continue(bool)
#fix metad all metad 0.2 0.05 10 100 1 1600 0
group metad_group id 1 2
fix 2 metad_group plumed plumedfile plumed.dat
fix             1 all nvt  temp ${temp} ${temp} 100.0


thermo 1000
thermo_style custom step temp epair etotal press
dump 1 all atom 100 dump.metad.lammpstrj

run 1000000
